# Задание №1
# Заданная функция
f(x) := x - sin(x) - 0.25
# Нахождение корней уравнения
x1 := root(f(x), x, -10, 10) = 1.17123
f(x) solve → 1.1712296525
# График функции f(x) на промежутке [-10,10]
# [plot: f(x) vs x]
# График функции f(x) на промежутке [x1-0.5,x1+0.5]
# [plot: f(x) vs x]
