# Задание №2
n := 10
i := 1, 2 .. 2*n
X[i] := 2*π*i/(2*n + 1)
# Кусочно-линейная интерполяция
scale := 100
j := 0 .. scale
t[j] := min(X) + j*(max(X) - min(X))/scale
Y := [-1.1; -0.8; -0.3; 0.3; 0.7; 0.8; 0.7; 0.5; 0.04; -0.6; -0.9; -1.1; -1.27; -1.32; -1.35; -1.37; -1.37; -1.36; -1.34; -1.3; -1.2]
X = [0; 0.299199; 0.598399; 0.897598; 1.1968; 1.496; 1.7952; 2.0944; 2.39359; 2.69279; 2.99199; 3.29119; 3.59039; 3.88959; 4.18879; 4.48799; 4.78719; 5.08639; 5.38559; 5.68479; 5.98399]
fintl(t) := linterp(X, Y, t)
# Интерполяция кубическим слайном
S := cspline(X, Y)
fints(t) := interp(S, X, Y, t)
# [plot: fintl(t[j]), fints(t[j]), Y vs t[j], X]
