# Задание №3
# Матрица коэффициентов системы | Cтолбец свободных членов
A := [3.72, 3.47, 3.06; 4.47, 4.10, 3.63; 4.96, 4.53, 4.01]
B := [30.74; 36.80; 40.79]
# Решение СЛАУ
X := A^-1*B = [6.19518; 1.19518; 1.15904]
lsolve(A, B) = [6.19518; 1.19518; 1.15904]
solve block
    # guess values
    x := 0
    y := 0
    z := 0
    # constraints
    3.72*x + 3.47*y + 3.06*z == 30.74
    4.47*x + 4.10*y + 3.63*z == 36.80
    4.96*x + 4.53*y + 4.01*z == 40.79
    # solver
    res := Find(x, y, z)
end solve block
res = [6.19518; 1.19518; 1.15904]
