# Задание №4
A := READPRN("big.txt")
S := sum(A)
S = 5.53738e51
str := num2str(S)
f(x) :=
    number ← ""
    for i ∈ 0 .. 10
        if substr(str, i, 1) ≠ "."
            number ← concat(number, substr(str, i, 1))
    return str2num(number)
f(0) = 5537376230
